es_primo(x) :=
    n ← 2
    bandera ← 1
    while n ≤ x/2
        bandera ← 0 if mod(x, n) == 0
        n ← n + 1
    bandera
factorial(n) :=
    1 if n == 1
    n*factorial(n - 1) otherwise
lista_primos(x) :=
    j ← 0
    for i ∈ 2 .. x
        if es_primo(i) == 1
            x[j] ← i
            j ← j + 1
    x
a := 2 .. 20
es_primo(a) = [1; 1; 0; 1; 0; 1; 0; 0; 0; 1; 0; 1; 0; 0; 0; 1; 0; 1; 0]
factorial(a) = [2; 6; 24; 120; 720; 5040; 40320; 362880; 3628800; 39916800; 479001600; 6227020800; 87178291200; 1307674368000; 20922789888000; 355687428096000; 6.40237e15; 1.21645e17; 2.4329e18]
lista_primos(20) → [2; 3; 5; 7; 11; 13; 17; 19]
Tabla_Multiplicar(n) :=
    for i ∈ 1 .. n
        for j ∈ 1 .. n
            A[i, j] ← i*j
    for i ∈ 1 .. n
        A[0, i] ← i
        A[i, 0] ← i
    return A
Tabla_Multiplicar(10) → [
    0, 1, 2, 3, 4, 5, 6, 7, 8, 9, 10;
    1, 1, 2, 3, 4, 5, 6, 7, 8, 9, 10;
    2, 2, 4, 6, 8, 10, 12, 14, 16, 18, 20;
    3, 3, 6, 9, 12, 15, 18, 21, 24, 27, 30;
    4, 4, 8, 12, 16, 20, 24, 28, 32, 36, 40;
    5, 5, 10, 15, 20, 25, 30, 35, 40, 45, 50;
    6, 6, 12, 18, 24, 30, 36, 42, 48, 54, 60;
    7, 7, 14, 21, 28, 35, 42, 49, 56, 63, 70;
    8, 8, 16, 24, 32, 40, 48, 56, 64, 72, 80;
    9, 9, 18, 27, 36, 45, 54, 63, 72, 81, 90;
    10, 10, 20, 30, 40, 50, 60, 70, 80, 90, 100
]
