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T0(x) := 1
T1(x) := x
T[n + 1]*x == 2*xT[n]*x - T[n - 1]*x
T2(x) := 2*x^2 - 1
T3(x) := 4*x^3 - 3*x
T4(x) := 8*x^4 - 8*x^2 + 1
# Ejercicio
f(x) == |x|
f(x) == sum(C[k]*T[k]*x, k = 0 .. n)
C[0] == 1/π*integral(|cos(θ)|, θ = 0 .. π)
1/π*integral(|cos(θ)|, θ = 0 .. π) → 2/π
C[k] == 2/π*integral(cos(k*θ)*|cos(θ)|, θ = 0 .. π)
k == 1
2/π*integral(cos(θ)*|cos(θ)|, θ = 0 .. π) → 0
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k == 2
2/π*integral(cos(2*θ)*|cos(θ)|, θ = 0 .. π) → 4/(3*π)
k == 3
2/π*integral(cos(3*θ)*|cos(θ)|, θ = 0 .. π) → 0
2/π*integral(cos(4*θ)*|cos(θ)|, θ = 0 .. π) → -4/(15*π)
k == 4
f(x) := 2/π + 4/(3*π)*(2*x^2 - 1) + (-4/(15*π))*(8*x^4 - 8*x^2 + 1)
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