# Distancia entre dos puntos
d^2 == (y - y[1])^2
d == sqrt((x - x[1])^2 + (y - y[1])^2)
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# Ecuación de la línea recta
y == m*x + b
d^2 == (m*x[1] + b - y[1])^2
# Función a minimizar
f(m, b) == sum((m*x[i] + b - y[i])^2, i = 1 .. n)
# Derivadas parciales | Igualando a cero
d/dm(f) == 2*sum(x[i]*(m*x[i] + b - y[i]), i = 1 .. n)
m*sum(x[i]^2, i = 1 .. n) + b*sum(x[i], i = 1 .. n) - sum(x[i]*y[i], i = 1 .. n) == 0
d/db(f) == 2*sum(m*x[i] + b - y[i], i = 1 .. n)
m*sum(x[i], i = 1 .. n) + b*n - sum(y[i], i = 1 .. n) == 0
# Puntos críticos
m == (sum(x[i], i = 1 .. n)*sum(y[i], i = 1 .. n) - n*sum(x[i]*y[i], i = 1 .. n))/(sum(x[i], i = 1 .. n)^2 - n*sum(x[i]^2, i = 1 .. n))
b := sum(y[i], i = 1 .. n)/n - m*(sum(x[i], i = 1 .. n)/n)  # error: Esta variable no está definida.
minimos_cuadrados(A) :=
    sx ← 0
    sy ← 0
    sxy ← 0
    sx2 ← 0
    for i ∈ 0 .. (rows(A) - 1)
        xy[i] ← A[i, 0]*A[i, 1]
        x2[i] ← A[i, 0]^2
        sx ← sx + A[i, 0]
        sy ← sy + A[i, 1]
        sxy ← sxy + xy[i]
        sx2 ← sx2 + x2[i]
    n ← rows(A)
    m ← (sxy - sx*sy/n)/(sx2 - sx^2/n)
    b ← sy/n - m*sx/n
    return [m; b]
y == m*x + b
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A := [7, 2; 1, 9; 10, 2; 5, 5; 4, 7; 3, 11; 13, 2; 10, 5; 2, 14]
[M; B] := minimos_cuadrados(A) → [-519/616; 643/56]
f(x) := M*x + B
f(x) → 643/56 - 519*x/616
