# Hallar un polinomio de aproximación de Taylor de grado 'n' a la función:
y == x*sen(x)
# al rededor de x = 0
f(x) := x*sin(x)
df(x, n) := d^n/dx^n(f(x))
taylor(a, n, x) :=
    R ← f(a)
    for i ∈ 1 .. n
        R ← R + df(a, i)/i!*(x - a)^i
    return R
g(x) := taylor(0, 2, x) → x^2
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