f(x) := e^x + sin(x^2 - 5*x)
a := 3.12
h := 0.01
Derivada(x) := d/dx(f(x)) → e^x + cos(x^2 - 5*x)*(2*x - 5)
VV := Derivada(a) = 23.7798
# hacia adelante
df(x) := (f(x + h) - f(x))/h
df2(x) := (-3*f(x) + 4*f(x + h) - f(x + 2*h))/(2*h)
df(a) = 23.8994
df2(a) = 23.7792
# error | error
|(VV - df(a))/VV|*100 = 0.502749
|(VV - df2(a))/VV|*100 = 0.00250904
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# Hacia atras
df(x) := (f(x) - f(x - h))/h
df2(x) := (3*f(x) - 4*f(x - h) + f(x - 2*h))/(2*h)
df(a) = 23.6609
df2(a) = 23.7792
# error | error
|(VV - df(a))/VV|*100 = 0.500242
|(VV - df2(a))/VV|*100 = 0.0025051
# Hacia adelante
df(x) := (f(x + h) - f(x - h))/(2*h)
df2(x) := (-f(x + 2*h) + 8*f(x + h) - 8*f(x - h) + f(x - 2*h))/(12*h)
df(a) = 23.7801
df2(a) = 23.7798
# error | error
|(VV - df(a))/VV|*100 = 0.00125359
|(VV - df2(a))/VV|*100 = 3.81287e-8
