y'' == (f(x + h) - 2*f(x) + f(x - h))/h^2  # fórmula numerica de segunda derivada
f(x) := e^(3*x - 4)
d2f(x, h) := (f(x + h) - 2*f(x) + f(x - h))/h^2
h := 0.01
d2f(2, h) = 66.5065
# Valor verdadero
df(x) := d^2/dx^2(f(x)) → 9*e^(3*x - 4)
df(2) = 66.5015
