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# Ejercicio
# Aplicando el método de Bisección, resolver la ecuación:
e^(3*x) - 4 == 0
# Sabiendo que una solución pertence a (0,1)
# Con un error menor igual a 1%, y con 10 iteraciones
# PARÁMETROS:
# a = inicio del intervalo
# b = final del intervalo
# tol = error (por ejemplo 0.01)
# max = número de iteraciones
# RESULTADO:
#
# solución de la ecuación
f(x) := e^(3*x) - 4
Biseccion(a, b, tol, max) :=
    i ← 1
    FA ← f(a)
    while i ≤ max
        p ← a + (b - a)/2
        FP ← f(p)
        return p if (FP == 0) or ((b - a)/2 < tol)
        i ← i + 1
        if FA*FP > 0
            a ← p
            FA ← FP
        b ← p if FA*FP < 0
Biseccion(0, 1, 0.01, 10) = 0.460938
f(x) := e^(3*x) - 4
Biseccion2(a, b, tol, max) :=
    i ← 1
    FA ← f(a)
    while i ≤ max
        A[i - 1, 0] ← i
        A[i - 1, 1] ← a
        A[i - 1, 2] ← b
        A[i - 1, 3] ← a + (b - a)/2
        A[i - 1, 4] ← (b - a)/2
        p[i] ← a + (b - a)/2
        FP ← f(p[i])
        return A if (FP == 0) or ((b - a)/2 < tol)
        i ← i + 1
        if FA*FP > 0
            a ← p[i - 1]
            FA ← FP
        b ← p[i - 1] if FA*FP < 0
    A
Biseccion2(0, 1, 0.01, 10) = [
    1, 0, 1, 0.5, 0.5;
    2, 0, 0.5, 0.25, 0.25;
    3, 0.25, 0.5, 0.375, 0.125;
    4, 0.375, 0.5, 0.4375, 0.0625;
    5, 0.4375, 0.5, 0.46875, 0.03125;
    6, 0.4375, 0.46875, 0.453125, 0.015625;
    7, 0.453125, 0.46875, 0.460938, 0.0078125
]
f(x) := e^(3*x) - 4
Biseccion3(a, b, e) :=
    m ← (a + b)/2
    return m if (b - a)/2 < e
    Biseccion3(a, m, e) if f(b)*f(m) > 0
    Biseccion3(m, b, e) if f(a)*f(m) > 0
Biseccion3(0, 1, 0.01) = 0.460938
