# Ejercicio
# Aplicando el método de la falsa posición, resolver la ecuación:
e^(3*x) - 4 == 0
# Sabiendo que una solución pertence a (0,1)
# Con un error menor igual a 1%, y con 10 iteraciones
# PARÁMETROS:
# a = inicio del intervalo
# b = final del intervalo
# tol = error (por ejemplo 0.01)
# max = número de iteraciones
# RESULTADO:
# Matriz:
# fila1 = solución de la ecuación
# fila2 = error
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f(x) := e^(3*x) - 4
falsa_posicion(a, b, tol, max) :=
    for i ∈ 1 .. max
        x[0, i] ← (a*f(b) - b*f(a))/(f(b) - f(a))
        x[1, i] ← |x[0, i] - x[0, i - 1]|*100
        b ← x[0, i] if f(x[0, i])*f(a) < 0
        a ← x[0, i] if f(x[0, i])*f(b) < 0
        return x if |x[0, i] - x[0, i - 1]| < tol
    x
falsa_posicion(0, 1, 0.01, 10) = [
    0, 0.157187, 0.266512, 0.339425, 0.386405, 0.41591, 0.434118, 0.445225, 0.451952;
    0, 15.7187, 10.9324, 7.29132, 4.69799, 2.95058, 1.82078, 1.11073, 0.67267
]
