# Ejercicio
# Aplicando el método de la falsa posición, resolver la ecuación:
e^(2*x) - 5 == 0
# Con un error menor igual a 1%, y con 10 iteraciones
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# Sugerencia, iniciar con x = 1
# PARÁMETROS:
# a = valor inicial
# tol = error (por ejemplo 0.01)
# max = número de iteraciones
# RESULTADO:
#
# solución de la ecuación
f(x) := e^(2*x) - 5
df(x) := d/dx(f(x)) → 2*e^(2*x)
Newton_ecuacion(a, tol, max) :=
    i ← 1
    while i < max
        p ← a - f(a)/df(a)
        return p if |p - a| < tol
        i ← i + 1
        a ← p
    p
Newton_ecuacion(1, 0.01, 10) = 0.80472
f(x) := e^(2*x) - 5
df(x) := d/dx(f(x))
Newton(x0, tol, max) :=
    x[0] ← x0
    y[0] ← f(x0)
    dy[0] ← df(x0)
    for i ∈ 1 .. max
        x[i] ← x[i - 1] - y[i - 1]/dy[i - 1]
        y[i] ← f(x[i])
        return x if |y[i]| < tol
        dy[i] ← df(x[i])
    x
Newton(1, 0.01, 4) = [1; 0.838338; 0.805824; 0.80472]
f(x) := e^(2*x) - 5
df(x) := d/dx(f(x))
Newton32(x0, tol, max) :=
    x[0] ← x0
    y[0] ← f(x0)
    dy[0] ← df(x0)
    for i ∈ 1 .. max
        A[i - 1, 0] ← i - 1
        A[i - 1, 1] ← x[i - 1]
        x[i] ← x[i - 1] - y[i - 1]/dy[i - 1]
        A[i - 1, 2] ← x[i]
        A[i - 1, 3] ← f(x[i])
        y[i] ← f(x[i])
        return A if |y[i]| < tol
        dy[i] ← df(x[i])
    A
Newton2(f, df, x0, tol) :=
    return x0 if |f(x0)| < tol
    Newton2(f, df, x0 - f(x0)/df(x0), tol) otherwise
Newton2(f, df, 1, 0.01) = 0.80472
Newton32(1, 0.01, 4) = [0, 1, 0.838338, 0.347753; 1, 0.838338, 0.805824, 0.0110656; 2, 0.805824, 0.80472, 1.22088e-5]
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f(x) solve → ln(5)/2 = 0.804719
# Resolver la ecuacion
e^x - 5 == 0
Newton4(aaa, tol, max) :=
    i ← 1
    while i < max
        p[0, i] ← aaa - f(aaa)/df(aaa)
        p[1, i] ← |(p[0, i] - aaa)/p[0, i]|*100
        return p if |p[0, i] - aaa| < tol
        aaa ← p[0, i]
        i ← i + 1  # incluido el error
Newton4(1, 0.02, 20) = [0, 0.838338, 0.805824, 0.80472; 0, 19.2836, 4.03486, 0.137206]
