# Método de Punto Fijo
# Secuencia de pasos
# Paso i=0: Obtener la transformación:
x == g(x)
# Paso i=1 La raiz aproximada | Error
x[i + 1] == g(x[i])
e[r] == |(x[i + 1] - x[i])/x[i + 1]|
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# Ejercicio
# Resolver la ecuación
e^(-x) - x == 0
# Con un valor inicial de
x[0] == 0.5
# Con un error menor igual a 1%
# PARÁMETROS:
# a = punto inicio de las iteraciones
# tol = error
# max = número de iteraciones
# RESULTADO:
# Matriz
# fila 1 = número de iteración
# fila 2 = resultados de la ecuación
# fila 3 = error relativo, en porcentaje
g(x) := e^(-x)
punto_fijo(a, tol, max) :=
    for i ∈ 0 .. max
        x[0, i] ← i
        x[1, i] ← g(a)
        x[2, i] ← |(x[1, i] - a)/x[1, i]|*100
        return x if |(x[1, i] - a)/x[1, i]| ≤ tol
        a ← x[1, i]
    x
punto_fijo(0.5, 0.01, 100) = [
    0, 1, 2, 3, 4, 5, 6;
    0.606531, 0.545239, 0.579703, 0.560065, 0.571172, 0.564863, 0.568438;
    17.5639, 11.2412, 5.94509, 3.50646, 1.94469, 1.11694, 0.628934
]
