y^3/3 == x^3/3 - x + 8/3
g(x) := nthroot(x^3 - 3*x + 8, 3)
g(1) = 1.81712
f(x, y) := (x^2 - 1)/y^2
x0 := 0
y0 := 2
euler(n, x0, y0, x) :=
    h ← (x - x0)/n
    for i ∈ 1 .. n
        y0 ← y0 + h*f(x0, y0)
        x0 ← x0 + h
    return y0
x := 1
n := 5
h := (x - x0)/n = 0.2
euler(5, 0, 2, 1) = 1.79382
x1 := x0 + h = 0.2
y1 := y0 + h*f(x0, y0) = 1.95
x2 := x1 + h = 0.4
y2 := y1 + h*f(x1, y1) = 1.89951
x3 := x2 + h = 0.6
y3 := y2 + h*f(x2, y2) = 1.85295
x4 := x3 + h = 0.8
y4 := y3 + h*f(x3, y3) = 1.81566
x5 := x4 + h = 1
y5 := y4 + h*f(x4, y4) = 1.79382
