integral(1/sqrt(y), y) == integral(x, x) → 2*sqrt(y) == x^2/2
4 == 1/2 + C solve, C → 7/2
2*sqrt(y) == 7/2 + x^2/2 solve, y → (x^2/4 + 7/4)^2
g(x) := (x^2/4 + 7/4)^2
f(x, y) := x*sqrt(y)
g(1.6) = 5.7121
x0 := 1
y0 := 4
euler(n, x0, y0, x) :=
    h ← (x - x0)/n
    for i ∈ 1 .. n
        y0 ← y0 + h*f(x0, y0)
        x0 ← x0 + h
    return y0
x := 1.6
n := 3
(1.6 - 1)/3 = 0.2
h := 0.2
x1 := x0 + h = 1.2
euler(3, 1, 4, 1.6) = 5.52345
y1 := y0 + h*f(x0, y0) = 4.4
x2 := x1 + h = 1.4
y2 := y1 + h*f(x1, y1) = 4.90343
x3 := x2 + h = 1.6
y3 := y2 + h*f(x2, y2) = 5.52345
