f(x, y) := -y/x
runge_kutta(n, x0, y0, x) :=
    h ← (x - x0)/n
    for i ∈ 1 .. n
        k1 ← h*f(x0, y0)
        k2 ← h*f(x0 + 1/2*h, y0 + 1/2*k1)
        k3 ← h*f(x0 + 1/2*h, y0 + 1/2*k2)
        k4 ← h*f(x0 + h, y0 + k3)
        y0 ← y0 + 1/6*(k1 + 2*k2 + 2*k3 + k4)
        x0 ← x0 + h
    return y0
runge_kutta(5, 2, 5, 3) = 3.33333
