# ECUACIÓN DIFERENCIAL DE ORDEN SUPERIOR
Z'' + 2*Z' + Z == 2*e^t
z(0) == 0
z'(0) == 1
z' == y
z(0) == 0
y' + 2*y + z == 2*e^t
y(0) == 1
# Se trabaja con dos ecuaciones diferenciales a la vez
z[0] == [0; 1] == [z; y]
F(t, z) == [y; y'] == [y; 2*e^t - 2*y - z]
F(t, z, y) := [y; 2*e^t - 2*y - z]
kutta(n, t, z, y, a) :=
    h ← (a - t)/n
    for i ∈ 1 .. n
        [k11; k12] ← h*F(t, z, y)
        [k21; k22] ← h*F(t + h/2, z + 1/2*k11, y + 1/2*k12)
        [k31; k32] ← h*F(t + h/2, z + 1/2*k21, y + 1/2*k22)
        [k41; k42] ← h*F(t + h, z + k31, y + k32)
        t ← t + h
        [z; y] ← [z; y] + 1/6*([k11; k12] + 2*[k21; k22] + 2*[k31; k32] + [k41; k42])
        A[0, i - 1] ← i - 1
        A[1, i - 1] ← z
        A[2, i - 1] ← y
    return A
kutta(5, 0, 0, 1, 1) = [
    0, 1, 2, 3, 4;
    0.201324, 0.410729, 0.63662, 0.888061, 1.17514;
    1.02008, 1.08111, 1.18552, 1.3375, 1.54317
]
t := 0.2
z := 0.20132
y := 1.02008
h := 0.2
[k11; k12] := h*F(t, z, y) → [0.204016; 0.0402651032641]
[k21; k22] := h*F(t + h/2, z + 1/2*k11, y + 1/2*k12) → [0.208042510326; 0.0631929023776]
[k31; k32] := h*F(t + h/2, z + 1/2*k21, y + 1/2*k22) → [0.210335290238; 0.0582046915222]
[k41; k42] := h*F(t + h, z + k31, y + k32) → [0.215656938304; 0.0830849444001]
[z; y] + 1/6*([k11; k12] + 2*[k21; k22] + 2*[k31; k32] + [k41; k42]) = [0.410725; 1.0811]
# Verdadero valor
z == C[1]*e^(-t) + C[2]*t*e^(-t) + 1/2*e^t
f(t) := C[1]*e^(-t) + C[2]*t*e^(-t) + 1/2*e^t  # error: Este valor tiene unidades: Unitless, pero debe tener unidades: Carga.
df(t) := -C[1]*e^(-t) + C[2]*e^(-t) - C[2]*t*e^(-t) + 1/2*e^t  # error: Este valor tiene unidades: Unitless, pero debe tener unidades: Carga.
0 == C[1] + 1/2
1 == -C[1] + C[2] + 1/2
f(t) := -1/2*e^(-t) + 0*t*e^(-t) + 1/2*e^t
d^2/dt^2(f(t)) + 2*(d/dt(f(t))) + f(t) → 2.44280551632
f(1) → e/2 - e^-1/2 = 1.1752
|(1.1752 - 1.17514)/1.1752|*100 = 0.00510551
0.0051
