f(x, y) := -y/x
kutta(x, y, a, n) :=
    h ← (a - x)/n
    for i ∈ 1 .. n
        k1 ← f(x, y)
        k2 ← f(x + h/4, y + h*k1/4)
        k3 ← f(x + h/4, y + h*k1/8 + h*k2/8)
        k4 ← f(x + h/2, y - h*k2/2 + h*k3)
        k5 ← f(x + h*3/4, y + 3*h*k1/16 + 9*h*k4/16)
        k6 ← f(x + h, y - 3*h*k1/7 + 2*h*k2/7 + 12*h*k3/7 - 12*h*k4/7 + 8*h*k5/7)
        y ← y + 1/90*(7*k1 + 32*k3 + 12*k4 + 32*k5 + 7*k6)*h
        x ← x + h
    return y
kutta(2, 5, 3, 5) = 3.33333
f(x) := 10/x
f(3) = 3.33333
