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x(0) == 0
y(0) == 1
F(t, x, y) := [3*x + 2*y + 2*t; x + 4*y - 7]
kutta(n, t, x, y, a) :=
    h ← (a - t)/n
    for i ∈ 1 .. n
        [k11; k12] ← h*F(t, x, y)
        [k21; k22] ← h*F(t + h/2, x + 1/2*k11, y + 1/2*k12)
        [k31; k32] ← h*F(t + h/2, x + 1/2*k21, y + 1/2*k22)
        [k41; k42] ← h*F(t + h, x + k31, y + k32)
        t ← t + h
        [x; y] ← [x; y] + 1/6*([k11; k12] + 2*[k21; k22] + 2*[k31; k32] + [k41; k42])
        A[0, i - 1] ← i - 1
        A[1, i - 1] ← x
        A[2, i - 1] ← y
    return A
kutta(5, 0, 0, 1, 1) = [
    0, 1, 2, 3, 4;
    0.413467, 0.61012, -0.368781, -5.40914, -22.7585;
    0.138267, -1.66569, -5.7273, -15.4646, -39.9189
]
# Resolviendo por métodos diferenciales
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z(t) := A*e^(5*t) - 2*B*e^(2*t) - 4/5*t - 44/25  # error: Esta variable no está definida.
y(t) := A*e^(5*t) + B*e^(2*t) + t/5 + 56/25  # error: Esta variable no está definida.
[3*z + 2*y + 2*t; z + 4*y - 7]
d/dt(z(t)) - (3*z(t) + 2*y(t) + 2*t) → 0
d/dt(y(t)) - (z(t) + 4*y(t) - 7) → 0
z(0) → A - 2*B - 44/25
[A - 2*B - 44/25 == 0; A + B + 56/25 == 1] solve, A, B → [-6/25, -1]
y(0) → A + B + 56/25
A := -6/25
B := -1
z(t) := A*e^(5*t) - 2*B*e^(2*t) - 4/5*t - 44/25
y(t) := A*e^(5*t) + B*e^(2*t) + t/5 + 56/25
# valores verdaderos
z(1) = -23.401
y(1) = -40.5682
