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x(0) == 1
y(0) == 0
z(0) == 0
F(t, x, y, z) := [z + y - x; z + x - y; x + y + z]
kutta(n, t, x, y, z, a) :=
    h ← (a - t)/n
    for i ∈ 1 .. n
        [k11; k12; k13] ← h*F(t, x, y, z)
        [k21; k22; k23] ← h*F(t + h/2, x + 1/2*k11, y + 1/2*k12, z + 1/2*k13)
        [k31; k32; k33] ← h*F(t + h/2, x + 1/2*k21, y + 1/2*k22, z + 1/2*k23)
        [k41; k42; k43] ← h*F(t + h, x + k31, y + k32, z + k33)
        t ← t + h
        [x; y; z] ← [x; y; z] + 1/6*([k11; k12; k13] + 2*[k21; k22; k23] + 2*[k31; k32; k33] + [k41; k42; k43])
    return [x; y; z]
kutta(10, 0, 1, 0, 0, 1) = [1.42178; 1.28644; 2.34034]
# Verdadero valor
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x(t) := 1/3*e^(-t) + 1/6*e^(2*t) + 1/2*e^(-2*t)
y(t) := 1/3*e^(-t) + 1/6*e^(2*t) - 1/2*e^(-2*t)
z(t) := -1/3*e^(-t) + 1/3*e^(2*t)
x(1) → e^-1/3 + e^-2/2 + e^2/6 = 1.4218
y(1) → e^-1/3 - e^-2/2 + e^2/6 = 1.28647
z(1) → e^2/3 - e^-1/3 = 2.34039
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# Resolución manual
y == x' - z + x
y' == x'' - z' + x'
x'' - z' + x' == z + x - x' + z - x
z' == x + x' - z + x + z
x'' + 2*x' == 2*z + z'
x' + 2*x == z'
x'' + x' - 2*x == 2*z
x''' + x'' - 2*x' == 2*z'
x' + 2*x == 1/2*(x''' + x'' - 2*x')
2*x' + 4*x == x''' + x'' - 2*x'
x''' + x'' - 4*x' - 4*x == 0
# desde aqui ya es facil
F(t, x, y, z) := [z + y - x; z + x - y; x + y + z]
kutta(n, t, x, y, z, a) :=
    h ← (a - t)/n
    for i ∈ 1 .. n
        [k11; k12; k13] ← h*F(t, x, y, z)
        [k21; k22; k23] ← h*F(t + h/2, x + 1/2*k11, y + 1/2*k12, z + 1/2*k13)
        [k31; k32; k33] ← h*F(t + h/2, x + 1/2*k21, y + 1/2*k22, z + 1/2*k23)
        [k41; k42; k43] ← h*F(t + h, x + k31, y + k32, z + k33)
        t ← t + h
        [x; y; z] ← [x; y; z] + 1/6*([k11; k12; k13] + 2*[k21; k22; k23] + 2*[k31; k32; k33] + [k41; k42; k43])
        A[0, i - 1] ← i - 1
        A[1, i - 1] ← x
        A[2, i - 1] ← y
        A[3, i - 1] ← z
    return A
kutta(5, 0, 1, 0, 0, 1) = [
    0, 1, 2, 3, 4;
    0.856733, 0.819038, 0.886841, 1.07608, 1.42147;
    0.186333, 0.369601, 0.585539, 0.874085, 1.28605;
    0.224333, 0.518315, 0.923563, 1.50083, 2.33964
]
