# Resolver: y'=e^t  y(0)=1  Hallar y(1)
y(t, C2) := e^t + C2
D2 := y(0, C2) == 1 solve, C2 → 0
f(t) := y(t, D2)
f(1) = 2.71828
# Resolver: y''+2y'+y=e^t  y(0)=1  y'(0)=0  Hallar y(1)
y(t, A, B) := A*e^(-t) + B*t*e^(-t) + 1/4*e^t
dy(t, A, B) := d/dt(y(t, A, B))
[C, D] := [y(0, A, B) == 1; dy(0, A, B) == 0] solve, A, B →
f(t) := y(t, C, D)
f(1) = 1.13942
# Resolver: y'''+4y''+y'-6y=e^t  y(0)=1  y'(0)=0  y''(0)=2  Hallar y(1)
y(t, A, B, C1) := A*e^t + B*e^(-3*t) + C1*e^(-2*t) + t/12*e^t
dy(t, A, B, C1) := d/dt(y(t, A, B, C1))
d2y(t, A, B, C1) := d^2/dt^2(y(t, A, B, C1))
[D, E, F] := [y(0, A, B, C1) == 1; dy(0, A, B, C1) == 0; d2y(0, A, B, C1) == 2] solve, A, B, C1 → [89/144, -1/16, 4/9]
f(t) := y(t, D, E, F)
f(1) = 1.96361
# Cambio para resolver numericamente | valores iniciales
y' == x  # y(0)=1  y'(0)=0  y''(0)=2
x'' + 4*x' + x - 6*y == e^t
x == 0
y == 1  # ojo aqui
x' == z
z == 2
z' + 4*z + x - 6*y == e^t
