# Resolver :
integral(e^(x^2), x = 0 .. 1)
f(x) := e^(x^2)
integracion_rectangulos(a, b, n) :=
    h ← (b - a)/n
    suma ← 0
    ax ← a
    for i ∈ 1, 2 .. n
        suma ← suma + f((ax + ax + h)/2)
        ax ← ax + h
    return h*suma
integracion_rectangulos(0, 1, 5) = 1.45369
