f(x) := sqrt(x^3 + 5)
integracion_simpson(a, b, n) :=
    if mod(n, 2) == 0
        h ← (b - a)/n
        suma ← f(a)
        ax ← a + h
        for i ∈ 1 .. (n - 1)
            suma ← suma + 2*f(ax) if mod(i, 2) == 0
            suma ← suma + 4*f(ax) if mod(i, 2) == 1
            ax ← ax + h
        suma ← suma + f(b)
        return h*suma/3
    "Se debe ingresar un numeo par para n" otherwise
integracion_simpson(0, 1, 4) = 2.29045
integracion_simpson(0, 1, 6) = 2.29047
integracion_simpson(0, 1, 8) = 2.29047
integracion_simpson(0, 1, 10) = 2.29047
integracion_simpson(0, 1, 12) = 2.29047
integracion_simpson(0, 1, 14) = 2.29047
V := integral(sqrt(x^3 + 5), x = 0 .. 1) = 2.29047  # verdadero valor
