f(x) := e^(x^4)
integracion_trapecios(a, b, n) :=
    h ← (b - a)/n
    suma ← f(a)
    ax ← a + h
    for i ∈ 1, 2 .. (n - 1)
        suma ← suma + 2*f(ax)
        ax ← ax + h
    suma ← suma + f(b)
    return h*suma/2
integracion_trapecios(-1, 1, 5) = 2.79929
V := integral(e^(x^4), x = -1 .. 1) = 2.54257  # verdadero valor
