# Hallar el polinomio de interpolación de Lagrange con los puntos:
(0, 1)*(1, 3)*(2, 0)
Interpolacion_lagrange(A, B, x) :=
    filas ← length(A) - 1
    POLINOMIO ← 0
    for i ∈ 0 .. filas
        TERMIMO ← 1
        den ← 1
        for j ∈ 0 .. filas
            if i ≠ j
                den ← den*(A[i] - A[j])
                TERMIMO ← TERMIMO*(x - A[j])
        POLINOMIO ← POLINOMIO + TERMIMO*1/den*B[i]
    return POLINOMIO
A := [0; 1; 2]
B := [1; 3; 0]
f(x) := Interpolacion_lagrange(A, B, x)
f(x) expand → 9*x/2 - 5*x^2/2 + 1
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A := [0; 1; 2; 3]
B := [-1; 6; 31; 18]
