multiplicacion(U, V) :=
    m ← length(U) - 1
    n ← length(V) - 1
    for i ∈ 0 .. (m + n)
        R[i] ← 0
    P ← reverse(U)
    Q ← reverse(V)
    i ← m
    while i ≥ 0
        j ← n
        while j ≥ 0
            R[i + j] ← R[i + j] + P[i]*Q[j]
            j ← j - 1
        i ← i - 1
    return reverse(R)
Interpolacion_lagrange(A, B) :=
    lon ← length(A) - 1
    for p ∈ 0 .. lon
        C[p] ← 0
    for i ∈ 0 .. lon
        R ← [1]
        aux ← 1
        for j ∈ 0 .. lon
            if i ≠ j
                aux ← aux*(A[i] - A[j])
                R ← multiplicacion(R, [1; (-1)*A[j]])
        for k ∈ 0 .. lon
            C[k] ← C[k] + R[k]*1/aux*B[i]
    return C
A := [0; 1; 2]
B := [1; 3; 0]
W := Interpolacion_lagrange(A, B) → [-5/2; 9/2; 1] = [-5/2; 9/2; 1]
h(x) :=
    lon ← length(W) - 1
    for i ∈ 0 .. lon
        result ← result + W[i]*x^lon
        lon ← lon - 1
    result
h(x) → 9*x/2 - 5*x^2/2 + 1
A := [0; 1; 2; 3]
B := [-1; 6; 31; 18]
