f(x) := cos(x)
B := [0; 0.2; 0.3; 0.4; 0.6; 0.7]
matriz(A) :=
    k ← 1
    for i ∈ 0 .. (length(A) - 1)
        B[i, 0] ← f(A[i])
    for j ∈ 1 .. (length(A) - 1)
        for i ∈ j .. (length(A) - 1)
            B[i, j] ← (B[i, j - 1] - B[i - 1, j - 1])/(A[i] - A[i - k])
        k ← k + 1
    B
C := matriz(B) = [
    1, 0, 0, 0, 0, 0;
    0.980067, -0.0996671, 0, 0, 0, 0;
    0.955336, -0.247301, -0.492113, 0, 0, 0;
    0.921061, -0.342755, -0.47727, 0.0371057, 0, 0;
    0.825336, -0.478627, -0.452906, 0.0609096, 0.0396732, 0;
    0.764842, -0.604934, -0.421025, 0.0797047, 0.0375902, -0.00297575
]
g(x) :=
    lon ← rows(C) - 1
    R ← C[0, 0]
    for i ∈ 1 .. lon
        aux ← 1
        for j ∈ 0 .. (i - 1)
            aux ← (x - B[j])*aux
        R ← R + C[i, i]*aux
    R
g(x) simplify → 0.0441368391002*x^4 - 0.00297574818565*x^5 - 0.000980824885718*x^3 - 0.499814751229*x^2 - 1.32610682012e-5*x + 1.0
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# Error relaticvo
a := 0.25
|f(a) - g(a)|/|f(a)|*100 = 1.98215e-6
