# Aplicando la interpolación de Newton, hallar el polinomio de aproximación
# a los puntos:
(1, 3)*(2, 4)*(3, 5)*(4, 7)
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A := [1; 2; 3; 4]
D := [3; 4; 5; 7]
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diferencias_divididas :=
    k ← 1
    for i ∈ 0 .. (length(A) - 1)
        B[i, 0] ← D[i]
    for j ∈ 1 .. (length(A) - 1)
        for i ∈ j .. (length(A) - 1)
            B[i, j] ← (B[i, j - 1] - B[i - 1, j - 1])/(A[i] - A[i - k])
        k ← k + 1
    B
C := diferencias_divididas
C = [3, 0, 0, 0; 4, 1, 0, 0; 5, 1, 0, 0; 7, 2, 0.5, 0.166667]
g(x) :=
    lon ← rows(C) - 1
    R ← C[0, 0]
    for i ∈ 1 .. lon
        aux ← 1
        for j ∈ 0 .. (i - 1)
            aux ← (x - A[j])*aux
        R ← R + C[i, i]*aux
    return R
g(x) → x + (x - 1)*(x - 2)*(x - 3)/6 + 2
g(x) simplify → x^3/6 - x^2 + 17*x/6 + 1
