# Resolver :
[25*x - 0.9*y - 0.3*z == 20.2; 3.7*x - 7.3*y - 0.1*z == -18.9; 0.7*x + 0.1*y - 8.2*z == -56.4]
X(y, z) := (20.2 + 0.9*y + 0.3*z)/25
Y(x, z) := (3.7*x - 0.1*z + 18.9)/7.3
Z(x, y) := (0.7*x + 0.1*y + 56.4)/8.2
Jacobi(a, b, c, max) :=
    x ← a
    y ← b
    z ← c
    for i ∈ 1 .. max
        x2 ← X(y, z)
        y2 ← Y(x, z)
        z2 ← Z(x, y)
        x ← x2
        y ← y2
        z ← z2
    [x; y; z]
Jacobi(0, 0, 0, 4) → [0.999683251514; 2.99815963465; 6.99958722776] = [0.999683; 2.99816; 6.99959]
