# Resolver
[9*x + 3*y + 7*z == 4; x + 4*y + z == 3; x + y + 4*z == 5]
X(y, z) := (4 - 3*y - 7*z)/9
Y(x, z) := (3 - x - z)/4
Z(x, y) := (5 - x - y)/4
GaussSeidel(a, b, c, max) :=
    x ← a
    y ← b
    z ← c
    for i ∈ 1 .. max
        x ← X(y, z)
        y ← Y(x, z)
        z ← Z(x, y)
    [x; y; z]
GaussSeidel(0, 0, 0, 5) → [-4542187/5971968; 7396373/11943936; 20469227/15925248] = [-0.760585; 0.619258; 1.28533]
