||x[1] - x[0]||[∞] == max(|x[1]|, ..., |x[n]|)
[x[i + 1]; y[i + 1]] == [x[i]; y[i]] - H(x[i], y[i])^-1*[f(x[i], y[i]); g(x[i], y[i])]
f(x, y) := x^2 + y^2 - 2
g(x, y) := x*y - 1
J(x, y) := [d/dx(f(x, y)), d/dy(f(x, y)); d/dx(g(x, y)), d/dy(g(x, y))] → [2*x, 2*y; y, x]
newton_sistemas(a, b, max) :=
    for i ∈ 1 .. max
        A ← J(a, b)
        [x; y] ← [a; b] - A^-1*[f(a, b); g(a, b)]
        a ← x
        b ← y
    [x; y]
newton_sistemas(0.8, 1.2, 10) → [0.9998046875; 1.0001953125]
