[x[i + 1]; y[i + 1]] == [x[i]; y[i]] - J(x[i], y[i])^-1*[f(x[i], y[i]); g(x[i], y[i])]
||x[1] - x[0]||[∞] == max(|x[1]|, ..., |x[n]|)
f(x, y) := x^3 - y^3 - 19
g(x, y) := x^2*y - x*y^2 - 6
J(x, y) := [d/dx(f(x, y)), d/dy(f(x, y)); d/dx(g(x, y)), d/dy(g(x, y))] → [3*x^2, -3*y^2; 2*x*y - y^2, x^2 - 2*x*y]
newton(f, g, a, b, max) :=
    for i ∈ 1 .. max
        A ← J(a, b)
        [x; y] ← [a; b] - A^-1*[f(a, b); g(a, b)]
        a ← x
        b ← y
    [x; y]
x^3 - y^3 == 19
x^2*y - x*y^2 == 6
newton(f, g, 2.4, 1.4, 7) → [3.0; 2.0] = [3; 2]
