# Resolver el sistema
x^2 + y^2 + 8 - 10*x == 0
X(x, y) := (x^2 + y^2 + 8)/10
x*y^2 + x + 8 + 10*y == 0
Y(x, y) := (x*y^2 + x + 8)/10
punto_fijo(a, b, max) :=
    for i ∈ 0 .. max
        A[i, 0] ← X(a, b)
        A[i, 1] ← Y(a, b)
        a ← A[i, 0]
        b ← A[i, 1]
    A
punto_fijo(0.5, 0.2, 5) → [
    0.829, 0.852;
    0.9413145, 0.9430774416;
    0.977546804877, 0.977851496701;
    0.991179130532, 0.991227075413;
    0.996496718384, 0.996504346685;
    0.998602662271, 0.998603879944
]
