x^2 + x*y - 10 == 0
y + 3*xy^2 - 57 == 0
X(x, y) := sqrt(10 - x*y)
Y(x, y) := sqrt((57 - y)/(3*x))
punto_fijo(a, b, max) :=
    for i ∈ 0 .. (max - 1)
        A[i, 0] ← X(a, b)
        A[i, 1] ← Y(A[i, 0], b)
        a ← A[i, 0]
        b ← A[i, 1]
    A
punto_fijo(1.5, 3.5, 7) → [
    2.17944947177, 2.86050598812;
    1.94053387891, 3.04955067322;
    2.02045628588, 2.98340474674;
    1.99302812979, 3.00570436257;
    2.00238524155, 2.99805430309;
    1.99918491144, 3.000665561;
    2.00027865213, 2.99977254616
]
