3*x^2 - 27*y == 0
3*y^2 - 27*x == 0
X(x, y) := 3*sqrt(y)
Y(x, y) := 3*sqrt(x)
punto_fijo(a, b, max) :=
    for i ∈ 0 .. max
        A[i, 0] ← X(a, b)
        A[i, 1] ← Y(a, b)
        a ← A[i, 0]
        b ← A[i, 1]
    A
punto_fijo(7.5, 6.2, 5) → [
    7.46993975879, 8.21583836258;
    8.59898512984, 8.19935715951;
    8.59035589691, 8.79720786207;
    8.89802622825, 8.79279267765;
    8.89579305621, 8.94886786439;
    8.97439751624, 8.94774482794
]
x^2 + xy == 20
# Ejercicio 2
y^2 + xy == 5
X(x, y) := (-y + sqrt(y^2 - 4*(-20)))/2
Y(x, y) := (-x + sqrt(x^2 + 20))/2
punto_fijo(a, b, max) :=
    for i ∈ 0 .. max
        A[i, 0] ← X(a, b)
        A[i, 1] ← Y(A[i, 0], b)
        a ← A[i, 0]
        b ← A[i, 1]
    A
punto_fijo(2, 1.1, 5) → [
    3.95582955736, 1.00740712552;
    3.9967094493, 1.00054867585;
    3.99975615233, 1.00004064266;
    3.99998193664, 1.00000301057;
    3.99999866197, 1.000000223;
    3.99999990089, 1.00000001652
]
# Ejercicio 3
[x^2 + x*y + y^2 == 13; x - y == 2] solve, x, y → [-1, -3; 3, 1]
X(x, y) := (-y + sqrt(y^2 - 4*(y^2 - 13)))/2
Y(x, y) := x - 2
punto_fijo(a, b, max) :=
    for i ∈ 0 .. max
        A[i, 0] ← X(a, b)
        A[i, 1] ← Y(A[i, 0], b)
        a ← A[i, 0]
        b ← A[i, 1]
    A
punto_fijo(2.1, 0.1, 10) → [
    3.55451106254, 1.55451106254;
    2.56753467401, 0.567534674006;
    3.2881268797, 1.2881268797;
    2.78457285704, 0.784572857035;
    3.14866458413, 1.14866458413;
    2.89127404087, 0.891274040866;
    3.07632591777, 1.07632591777;
    2.94481592263, 0.944815922628;
    3.0390720905, 1.0390720905;
    2.97191736172, 0.971917361725;
    3.01996951029, 1.01996951029
]
