[x[i + 1]; y[i + 1]; z[i + 1]] == [x[i]; y[i]; z[i]] - J(x[i], y[i], z[i])^-1*[f(x[i], y[i], z[i]); g(x[i], y[i], z[i]); h(x[i], y[i], z[i])]
x + y + z == 9
x^2 + y^2 + z^2 == 29
x*y + y*z - x*z == 2
f(x, y, z) := x + y + z - 9
g(x, y, z) := x^2 + y^2 + z^2 - 29
h(x, y, z) := x*y + y*z - x*z - 2
J(x, y, z) := [
    d/dx(f(x, y, z)), d/dy(f(x, y, z)), d/dz(f(x, y, z));
    d/dx(g(x, y, z)), d/dy(g(x, y, z)), d/dz(g(x, y, z));
    d/dx(h(x, y, z)), d/dy(h(x, y, z)), d/dz(h(x, y, z))
] → [1, 1, 1; 2*x, 2*y, 2*z; y - z, x + z, y - x]
newton(a, b, c, max) :=
    for i ∈ 1 .. max
        A ← J(a, b, c)
        [x; y; z] ← [a; b; c] - A^-1*[f(a, b, c); g(a, b, c); h(a, b, c)]
        a ← x
        b ← y
        c ← z
    [x; y; z]
newton(3.5, 1.5, 2.1, 4) → [4.00006149694; 2; 2.99993850306]
