3*x - cos(x*y) - 1/2 == 0
x == cos(x*y) + 1/2
x^2 - 81*(y + 0.1)^2 + sin(z) + 1.06 == 0
y == 1/9*sqrt(x^2 + sin(z) + 1.06) - 0.1
e^(-x*y) + 20*z + (10*π - 3)/3 == 0
z == (-e^(-x*y) - (10*π - 3)/3)/20
# Aproximación inicial dada
[0.1; 0.1; -0.1]
X(x, y, z) := cos(x*y) + 1/2
Y(x, y, z) := 1/9*sqrt(x^2 + sin(z) + 1.06) - 0.1
Z(x, y, z) := (-e^(-x*y) - (10*π - 3)/3)/20
# Iteración 1
X(0.1, 0.1, -0.1) → 1.49995000042
Y(0.1, 0.1, -0.1) → 0.00944114960371
Z(0.1, 0.1, -0.1) → -0.523101267286
punto_fijo(a, b, c, max) :=
    for i ∈ 0 .. max
        A[i, 0] ← X(a, b, c)
        A[i, 1] ← Y(a, b, c)
        A[i, 2] ← Z(a, b, c)
        a ← A[i, 0]
        b ← A[i, 1]
        c ← A[i, 2]
    A
punto_fijo(0.1, 0.1, -0.1, 10) → [
    1.49995000042, 0.00944114960371, -0.523101267286;
    1.49989973114, 0.0862654723194, -0.522895702925;
    1.49164084299, 0.0862663765541, -0.51753035661;
    1.4917323457, 0.0856006925684, -0.517561607823;
    1.49185827975, 0.0856088683207, -0.517604938212;
    1.49185535344, 0.0856201116154, -0.517603927089;
    1.49185324879, 0.0856198504744, -0.517603200005;
    1.49185332138, 0.0856196626554, -0.517603225078;
    1.49185335628, 0.0856196691328, -0.517603237134;
    1.49185335467, 0.0856196722474, -0.517603236577;
    1.49185335409, 0.0856196721036, -0.517603236379
]
